New Capacitor.p3rc4 bus1=p3rdt107 phases=3 Kv=12.47 conn=Wye Kvar=300.0

New CapControl.p3rc4 Capacitor=p3rc4 Element=Line.l(r:p3rdt105-p3rdt107) Terminal=1 delay=100.0 Type=voltage Vmin=120.5 Vmax=125.0 Ptratio=59.99631547328862 Ctratio=100.0

New Capacitor.p3rc7 bus1=p3rdt1052 phases=3 Kv=12.47 conn=Wye Kvar=600.0

New CapControl.p3rc7 Capacitor=p3rc7 Element=Line.l(r:p3rdt1052-p3rhs0_1247)_cont Terminal=1 delay=100.0 Type=voltage Vmin=120.5 Vmax=125.0 Ptratio=59.99631547328862 Ctratio=100.0
